<?xml version='1.0' encoding='UTF-8'?>
<neuroml xmlns:meta="http://morphml.org/metadata/schema" xsi:schemaLocation="http://morphml.org/neuroml/schema http://www.neuroml.org/NeuroMLValidator/NeuroMLFiles/Schemata/v1.8.1/Level3/NeuroML_Level3_v1.8.1.xsd" xmlns:cml="http://morphml.org/channelml/schema" xmlns:xsi="http://www.w3.org/2001/XMLSchema-instance" length_units="micrometer" xmlns:net="http://morphml.org/networkml/schema" xmlns:bio="http://morphml.org/biophysics/schema" xmlns:mml="http://morphml.org/morphml/schema" xmlns="http://morphml.org/neuroml/schema">
 <populations xmlns="http://morphml.org/networkml/schema">
  <population cell_type="iaf psc alpha" name="l23e">
   <pop_location>
    <random_arrangement population_size="20683">
     <rectangular_location>
      <corner z="0" y="0" x="0"/>
      <size height="0" width="0" depth="0"/>
     </rectangular_location>
    </random_arrangement>
   </pop_location>
  </population>
  <population cell_type="iaf psc alpha" name="l23i">
   <pop_location>
    <random_arrangement population_size="5834">
     <rectangular_location>
      <corner z="0" y="0" x="0"/>
      <size height="0" width="0" depth="0"/>
     </rectangular_location>
    </random_arrangement>
   </pop_location>
  </population>
  <population cell_type="iaf psc alpha" name="l4e">
   <pop_location>
    <random_arrangement population_size="21915">
     <rectangular_location>
      <corner z="0" y="0" x="0"/>
      <size height="0" width="0" depth="0"/>
     </rectangular_location>
    </random_arrangement>
   </pop_location>
  </population>
  <population cell_type="iaf psc alpha" name="l4i">
   <pop_location>
    <random_arrangement population_size="5479">
     <rectangular_location>
      <corner z="0" y="0" x="0"/>
      <size height="0" width="0" depth="0"/>
     </rectangular_location>
    </random_arrangement>
   </pop_location>
  </population>
  <population cell_type="iaf psc alpha" name="l5e">
   <pop_location>
    <random_arrangement population_size="4850">
     <rectangular_location>
      <corner z="0" y="0" x="0"/>
      <size height="0" width="0" depth="0"/>
     </rectangular_location>
    </random_arrangement>
   </pop_location>
  </population>
  <population cell_type="iaf psc alpha" name="l5i">
   <pop_location>
    <random_arrangement population_size="1065">
     <rectangular_location>
      <corner z="0" y="0" x="0"/>
      <size height="0" width="0" depth="0"/>
     </rectangular_location>
    </random_arrangement>
   </pop_location>
  </population>
  <population cell_type="iaf psc alpha" name="l6e">
   <pop_location>
    <random_arrangement population_size="14395">
     <rectangular_location>
      <corner z="0" y="0" x="0"/>
      <size height="0" width="0" depth="0"/>
     </rectangular_location>
    </random_arrangement>
   </pop_location>
  </population>
  <population cell_type="iaf psc alpha" name="l6i">
   <pop_location>
    <random_arrangement population_size="2948">
     <rectangular_location>
      <corner z="0" y="0" x="0"/>
      <size height="0" width="0" depth="0"/>
     </rectangular_location>
    </random_arrangement>
   </pop_location>
  </population>
  <population cell_type="iaf psc alpha" name="th">
   <pop_location>
    <random_arrangement population_size="902">
     <rectangular_location>
      <corner z="0" y="0" x="0"/>
      <size height="0" width="0" depth="0"/>
     </rectangular_location>
    </random_arrangement>
   </pop_location>
  </population>
 </populations>

</neuroml>
