<?xml version="1.0" encoding="utf-8" ?>

<neuroml xmlns="http://morphml.org/neuroml/schema" xmlns:xsi="http://www.w3.org/2001/XMLSchema-instance" xmlns:net="http://morphml.org/networkml/schema" xmlns:mml="http://morphml.org/morphml/schema" xmlns:meta="http://morphml.org/metadata/schema" xmlns:bio="http://morphml.org/biophysics/schema" xmlns:cml="http://morphml.org/channelml/schema" xsi:schemaLocation="http://morphml.org/neuroml/schema http://www.neuroml.org/NeuroMLValidator/NeuroMLFiles/Schemata/v1.8.1/Level3/NeuroML_Level3_v1.8.1.xsd" length_units="micrometer">

    <populations xmlns="http://morphml.org/networkml/schema">
        <population name="PopA" cell_type="CellA">
            <pop_location>
                <random_arrangement population_size="200">
                    <rectangular_location>
                        <corner x="1" y="2" z="3"/>
                        <size width="3.5" height="2" depth="4"/>
                    </rectangular_location>
                </random_arrangement>
            </pop_location>
        </population>
        <population name="PopB" cell_type="CellA">
            <pop_location>
                <random_arrangement population_size="200">
                    <spherical_location>
                        <center x="1.5" y="-4" z="3" diameter="2.5"/>
                    </spherical_location>
                </random_arrangement>
            </pop_location>
        </population>
    </populations>

    <projections units="Physiological Units" xmlns="http://morphml.org/networkml/schema">
        <projection name="PopA-PopB" source="PopA" target="PopB">
            <synapse_props synapse_type="DoubExpSynA" internal_delay="5" weight="1" threshold="-20"/>
            <connectivity_pattern>
                <fixed_probability probability="0.15"/>
            </connectivity_pattern>
        </projection>
        <projection name="PopA-PopA" source="PopA" target="PopA">
            <synapse_props synapse_type="DoubExpSynA" internal_delay="5" weight="1" threshold="-20"/>
            <connectivity_pattern>
                <fixed_probability probability="0.15"/>
            </connectivity_pattern>
        </projection>
    </projections>

</neuroml>
